*Heading
** Job name: Load_Test Model name: Model-1
** Generated by: Abaqus/CAE Learning Edition 2022
*Preprint, echo=NO, model=NO, history=NO, contact=NO
**
** PARTS
**
*Part, name=Part-1
*Node
      1,           0.,           0.,           0.
      2,          0.5,           0.,           0.
      3,           1.,           0.,           0.
      4,           0.,          0.5,           0.
      5,          0.5,          0.5,           0.
      6,           1.,          0.5,           0.
      7,           0.,           1.,           0.
      8,          0.5,           1.,           0.
      9,           1.,           1.,           0.
     10,         0.25,           0.,           0.
     11,          0.5,         0.25,           0.
     12,         0.25,          0.5,           0.
     13,           0.,         0.25,           0.
     14,         0.75,           0.,           0.
     15,           1.,         0.25,           0.
     16,         0.75,          0.5,           0.
     17,          0.5,         0.75,           0.
     18,         0.25,           1.,           0.
     19,           0.,         0.75,           0.
     20,           1.,         0.75,           0.
     21,         0.75,           1.,           0.
*Element, type=S8R
1,  1,  2,  5,  4, 10, 11, 12, 13
2,  2,  3,  6,  5, 14, 15, 16, 11
3,  4,  5,  8,  7, 12, 17, 18, 19
4,  5,  6,  9,  8, 16, 20, 21, 17
*End Part
**
**
** ASSEMBLY
**
*Assembly, name=Assembly
**
*Instance, name=Part-1-1, part=Part-1
*End Instance
**
*Nset, nset=Set-1, instance=Part-1-1
 1,
*Nset, nset=Set-2, instance=Part-1-1
 3, 9
*Elset, elset=_Surf-1_E3, internal, instance=Part-1-1
 3, 4
*Surface, type=ELEMENT, name=Surf-1
_Surf-1_E3, E3
*Elset, elset=_Surf-2_E1, internal, instance=Part-1-1
 1, 2
*Surface, type=ELEMENT, name=Surf-2
_Surf-2_E1, E1
*Elset, elset=_Surf-3_E2, internal, instance=Part-1-1
 2, 4
*Surface, type=ELEMENT, name=Surf-3
_Surf-3_E2, E2
*End Assembly
** ----------------------------------------------------------------
**
** STEP: Step-1
**
*Step, name=Step-1, nlgeom=NO
*Static
1., 1., 1e-05, 1.
**
** LOADS
**

** Name: Load-CF-1   Type: Concentrated force
*Cload
Set-1, 1, 1.5

** Name: Load-CF-2   Type: Concentrated force
*Cload
Set-2, 1, 2.5
Set-2, 2, 3.5

** Name: Load-SEL-1   Type: Shell edge load
*Dsload
Surf-1, EDNOR, 10.5

** Name: Load-SEL-2   Type: Shell edge load
*Dsload
Surf-2, EDTRA, 22.3

** Name: Load-SEL-3   Type: Shell edge load
*Dsload
Surf-3, EDSHR, 45.8

**
** OUTPUT REQUESTS
**
*Restart, write, frequency=0
**
** FIELD OUTPUT: F-Output-1
**
*Output, field, variable=PRESELECT
**
** HISTORY OUTPUT: H-Output-1
**
*Output, history, variable=PRESELECT
*End Step
